// SBML level 2 version 4
// dcterms:bibliographicCitation: http://identifiers.org/doi/10.1016/s0301-4622(97)00010-0

function Function_for_v_1_1(K2, Vm2, Z_state, cytosol)
  cytosol*(Vm2*Z_state^2/(K2^2 + Z_state^2));
end

function Function_for_v_3_1(Kf, Y_state, intravesicular)
  intravesicular*Kf*Y_state;
end

function Function_for_v_2_1(A_state, Ka, Ky, Kz, Vm3, Y_state, Z_state, intravesicular)
  intravesicular*(A_state^4*Vm3*Y_state^2*Z_state^4/((A_state^4 + Ka^4)*(Ky^2 + Y_state^2)*(Kz^4 + Z_state^4)));
end

function Function_for_v_6_1(A_state, Kd, Kp, Vd, Z_state, n_par)
  A_state^2*Vd*Z_state^n_par/((Kd^n_par + Z_state^n_par)*(A_state^2 + Kp^2));
end

function Function_for_v_0_1(beta_par, v0, v1)
  v0 + beta_par*v1;
end

function Function_for_v_5_1(Vp, beta_par)
  Vp*beta_par;
end

model model_Borghans_BiophysChem_1997()
  // PEtab implementation of the model from Borghans et al. (1997), Biophysical Chemistry 66(1) 25-41
  // isDescribedBy doi:10.1016/s0301-4622(97)00010-0

  // Compartments:
  compartment extracellular = 1;
  compartment cytosol = 1;
  compartment intravesicular = 1;

  // Species:
  species Ca__2___in_cytosol in cytosol = init_Z_state; Ca__2___in_cytosol is "Ca^{2+} in cytosol";
  species Ca__2___in_Ca__2___sensitive_pool in intravesicular = init_Y_state; Ca__2___in_Ca__2___sensitive_pool is "Ca^{2+} in Ca^{2+}-sensitive pool";
  species IP_3_concentration in cytosol = init_A_state;

  // Parameters:
  K2 = 0.09994856;
  K_par = 11.41208;
  Ka = 0.1975939;
  Kd = 0.3924975;
  Kf = 1.13795;
  Kp = 0.9965675;
  Ky = 0.2003641;
  Kz = 0.3033535;
  Vd = 92.87393;
  Vm2 = 7.457124;
  Vm3 = 22.70252;
  Vp = 2.756858;
  beta_par = 1.123952;
  epsilon_par = 0.1632322;
  init_A_state = 1;
  init_Y_state = 0.9993481;
  init_Z_state = 0.08792052;
  n_par = 4.102514;
  v0 = 2.317787;
  v1 = 1.004888;
  offset = 0.3007637;
  scale = 0.6580731;
  sigma = 0.1049229;

  // Assignment rules:
  observableParameter2_Ca := scale;
  observableParameter1_Ca := offset;
  Ca := observableParameter1_Ca + Ca__2___in_cytosol*observableParameter2_Ca;

  // Reactions:
  v_0: => Ca__2___in_cytosol; cytosol*Function_for_v_0_1(beta_par, v0, v1);
  v_1: Ca__2___in_cytosol => Ca__2___in_Ca__2___sensitive_pool; Function_for_v_1_1(K2, Vm2, Ca__2___in_cytosol, cytosol);
  v_2: Ca__2___in_Ca__2___sensitive_pool => Ca__2___in_cytosol; Function_for_v_2_1(IP_3_concentration, Ka, Ky, Kz, Vm3, Ca__2___in_Ca__2___sensitive_pool, Ca__2___in_cytosol, intravesicular);  // modifiers: IP_3_concentration
  v_3: Ca__2___in_Ca__2___sensitive_pool => Ca__2___in_cytosol; Function_for_v_3_1(Kf, Ca__2___in_Ca__2___sensitive_pool, intravesicular);
  v_4: Ca__2___in_cytosol => ; cytosol*K_par*Ca__2___in_cytosol;
  v_5: => IP_3_concentration; cytosol*Function_for_v_5_1(Vp, beta_par);
  v_6: IP_3_concentration => ; cytosol*Function_for_v_6_1(IP_3_concentration, Kd, Kp, Vd, Ca__2___in_cytosol, n_par);  // modifiers: Ca__2___in_cytosol
  v_7: IP_3_concentration => ; cytosol*epsilon_par*IP_3_concentration;

  // Unit definitions:
  unit length = metre;
  unit area = metre^2;
  unit volume = litre;
  unit time = 0.06 second;
  unit substance = mole;
end
