// SBML level 3 version 1
// Created with https://github.com/matthiaskoenig/sbmlutils.

model nan_species()
  // NaN species example
  // Terms of use
  // The content of this model has been carefully created in a manual research effort. This file has been created by Matthias König using sbmlutils . For questions contact koenigmx@hu-berlin.de.
  // Copyright © 2021 Matthias König.
  // This work is licensed under a Creative Commons Attribution 4.0 International License.
  // Redistribution and use of any part of this model, with or without modification, are permitted provided that the following conditions are met:
  // Redistributions of this SBML file must retain the above copyright notice, this list of conditions and the following disclaimer.
  // Redistributions in a different form must reproduce the above copyright notice, this list of conditions and the following disclaimer in the documentation and/or other materials provided with the distribution.
  // This model is distributed in the hope that it will be useful, but WITHOUT ANY WARRANTY; without even the implied warranty of MERCHANTABILITY or FITNESS FOR A PARTICULAR PURPOSE.
  // model units - substance: mmole, time: min, volume: litre, extent: mmole

  // Compartments:
  compartment Vext = NaN; Vext has litre; Vext is "plasma";  // SBO:0000290

  // Species:
  species dex_ext in Vext = 0; dex_ext is "dextromethorphan (plasma)";  // SBO:0000247

  // Parameters:
  DEXEX_Vmax = 1 mmole_per_min;  // SBO:0000186
  DEXEX_Km_dex = 0.1 mM;  // SBO:0000027

  // Reactions:
  DEXEX: dex_ext => ; DEXEX_Vmax*dex_ext/(DEXEX_Km_dex + dex_ext); DEXEX is "DEX export";  // SBO:0000655

  // Unit definitions:
  unit mM = 1e-3 mole / litre; mM is "mmole/liter";
  unit min = 60 second;
  unit mmole = 1e-3 mole;
  unit mmole_per_min = 1e-3 mole / (60 second); mmole_per_min is "mmole/min";
end
