// SBML level 2 version 4
// dcterms:bibliographicCitation: http://identifiers.org/doi/10.1021/pr5006923

function Function_for_v_0(BaF3_Epo, STAT5A, k_phos)
  BaF3_Epo*STAT5A^2*k_phos;
end

function Function_for_v_1(BaF3_Epo, STAT5A, STAT5B, k_phos)
  BaF3_Epo*STAT5A*STAT5B*k_phos;
end

function Function_for_v_3(cyt, k_imp_homo, pApA)
  cyt*k_imp_homo*pApA;
end

function Function_for_v_2(BaF3_Epo, STAT5B, k_phos)
  BaF3_Epo*STAT5B^2*k_phos;
end

function Function_for_v_4(cyt, k_imp_hetero, pApB)
  cyt*k_imp_hetero*pApB;
end

function Function_for_v_5(cyt, k_imp_homo, pBpB)
  cyt*k_imp_homo*pBpB;
end

function Function_for_v_6(k_exp_homo, nuc, nucpApA)
  nuc*k_exp_homo*nucpApA;
end

function Function_for_v_7(k_exp_hetero, nuc, nucpApB)
  nuc*k_exp_hetero*nucpApB;
end

function Function_for_v_8(k_exp_homo, nuc, nucpBpB)
  nuc*k_exp_homo*nucpBpB;
end

model Boehm_JProteomeRes2014()
  // PEtab implementation of the model from Boehm et al. (2014), J. Proteome Res., 13, 12, 5685-5694
  // isDescribedBy doi:10.1021/pr5006923

  // Compartments:
  compartment cyt = 1.4;
  compartment nuc = 0.45;

  // Species:
  species STAT5A in cyt = 207.6*ratio;
  species STAT5B in cyt = 207.6 - 207.6*ratio;
  species pApB in cyt = 0;
  species pApA in cyt = 0;
  species pBpB in cyt = 0;
  species nucpApA in nuc = 0;
  species nucpApB in nuc = 0;
  species nucpBpB in nuc = 0;

  // Parameters:
  Epo_degradation_BaF3 = 0.02698251;
  k_exp_hetero = 1.00068e-5;
  k_exp_homo = 0.006170228;
  k_imp_hetero = 0.01636792;
  k_imp_homo = 97749.38;
  k_phos = 15766.51;
  ratio = 0.693;
  specC17 = 0.107;
  sd_pSTAT5A_rel = 3.852612;
  sd_pSTAT5B_rel = 6.591478;
  sd_rSTAT5A_rel = 3.152713;

  // Assignment rules:
  BaF3_Epo := 1.25e-7*exp(-1*Epo_degradation_BaF3*time);
  rSTAT5A_rel := (100*pApB + 100*STAT5A*specC17 + 200*pApA*specC17)/(2*pApB + STAT5A*specC17 + 2*pApA*specC17 - STAT5B*(specC17 - 1) - 2*pBpB*(specC17 - 1));
  pSTAT5A_rel := (100*pApB + 200*pApA*specC17)/(pApB + STAT5A*specC17 + 2*pApA*specC17);
  pSTAT5B_rel := -(100*pApB - 200*pBpB*(specC17 - 1))/(STAT5B*(specC17 - 1) - pApB + 2*pBpB*(specC17 - 1));

  // Reactions:
  v_0: 2 STAT5A => pApA; cyt*Function_for_v_0(BaF3_Epo, STAT5A, k_phos);
  v_1: STAT5A + STAT5B => pApB; cyt*Function_for_v_1(BaF3_Epo, STAT5A, STAT5B, k_phos);
  v_2: 2 STAT5B => pBpB; cyt*Function_for_v_2(BaF3_Epo, STAT5B, k_phos);
  v_3: pApA => nucpApA; Function_for_v_3(cyt, k_imp_homo, pApA);
  v_4: pApB => nucpApB; Function_for_v_4(cyt, k_imp_hetero, pApB);
  v_5: pBpB => nucpBpB; Function_for_v_5(cyt, k_imp_homo, pBpB);
  v_6: nucpApA => 2 STAT5A; Function_for_v_6(k_exp_homo, nuc, nucpApA);
  v_7: nucpApB => STAT5A + STAT5B; Function_for_v_7(k_exp_hetero, nuc, nucpApB);
  v_8: nucpBpB => 2 STAT5B; Function_for_v_8(k_exp_homo, nuc, nucpBpB);

  // Unit definitions:
  unit length = metre;
  unit area = metre^2;
  unit volume = litre;
  unit time = 0.06 second;
  unit substance = mole;
end
