// SBML level 2 version 4
// dcterms:bibliographicCitation: http://identifiers.org/doi/10.1073/pnas.032281999

function Function_for_v_0_3(Ca, IPR_O, L5, k_2, l_4, membrane)
  (k_2 + l_4*Ca)/(1 + Ca/L5)*IPR_O/membrane;
end

function Function_for_v_4_2(Ca, IPR_O, L5, k4, l6, membrane)
  (k4*L5 + l6)*Ca/(L5 + Ca)*IPR_O/membrane;
end

function Function_for_v_6_3(Ca, IPR_A, L1, k1, l2, membrane)
  (k1*L1 + l2)*Ca/(L1 + Ca)*IPR_A/membrane;
end

function Function_for_v_7_2(IPR_I2, k_1, l_2, membrane)
  (k_1 + l_2)*IPR_I2/membrane;
end

function Function_for_v_8_2(Ca, IPR_O, L5, k3, membrane)
  k3*L5/(L5 + Ca)*IPR_O/membrane;
end

function Function_for_v_9_1(IPR_S, k_3, membrane)
  k_3*IPR_S/membrane;
end

function Function_for_v_5_3(Ca, IPR_A, L1, k_4, l_6, membrane)
  L1*(k_4 + l_6)/(L1 + Ca)*IPR_A/membrane;
end

function Function_for_v_2_3(Ca, IPR_R, L1, L3, k1, l2, membrane)
  (k1*L1 + l2)*Ca/(L1 + Ca*(1 + L1/L3))*IPR_R/membrane;
end

function Function_for_v_1_3(Ca, IP3, IPR_R, L1, L3, k2, l4, membrane)
  (k2*L3 + l4*Ca)/(L3 + Ca*(1 + L3/L1))*IP3*IPR_R/membrane;
end

function Function_for_v_3_3(IPR_I1, k_1, l_2, membrane)
  (k_1 + l_2)*IPR_I1/membrane;
end

model model_Sneyd_PNAS2002()
  // PEtab implementation of the model from Sneyd et al. (2002), PNAS February 19, 2002 99 (4) 2398-2403
  // isDescribedBy doi:10.1073/pnas.032281999

  // Compartments:
  compartment default = 1;
  compartment membrane = 1;

  // Species:
  species O in membrane = 0;
  species R in membrane = 1;
  species I_1 in membrane = 0;
  species S in membrane = 0;
  species A in membrane = 0;
  species I_2 in membrane = 0;

  // Parameters:
  k1 = 3.727211;
  k2 = 100000;
  k3 = 15.74534;
  k4 = 99938.26;
  k_1 = 0.9239247;
  k_2 = 0.001002495;
  k_3 = 1.91463;
  k_4 = 3079.207;
  l2 = 0.940077;
  l4 = 2.858377;
  l6 = 100000;
  l_2 = 0.3476645;
  l_4 = 0.0138802;
  l_6 = 0.001 unit_0;
  L1 has unit_1;
  L3 has unit_1;
  L5 has unit_1;
  Ca = 10 unit_0;
  IP3 = 0 unit_0;
  sigma = 0.02266568;

  // Assignment rules:
  open_probability := (0.9*A + 0.1*O)^4;
  L1 := k_1/k1/(l_2/l2);
  L5 := k_4/k4/(l_6/l6);
  L3 := k_2/k2/(l_4/l4);

  // Reactions:
  v_0: O => R; membrane*Function_for_v_0_3(Ca, O, L5, k_2, l_4, membrane);
  v_1: R => O; membrane*Function_for_v_1_3(Ca, IP3, R, L1, L3, k2, l4, membrane);
  v_2: R => I_1; membrane*Function_for_v_2_3(Ca, R, L1, L3, k1, l2, membrane);
  v_3: I_1 => R; membrane*Function_for_v_3_3(I_1, k_1, l_2, membrane);
  v_4: O => A; membrane*Function_for_v_4_2(Ca, O, L5, k4, l6, membrane);
  v_5: A => O; membrane*Function_for_v_5_3(Ca, A, L1, k_4, l_6, membrane);
  v_6: A => I_2; membrane*Function_for_v_6_3(Ca, A, L1, k1, l2, membrane);
  v_7: I_2 => A; membrane*Function_for_v_7_2(I_2, k_1, l_2, membrane);
  v_8: O => S; membrane*Function_for_v_8_2(Ca, O, L5, k3, membrane);
  v_9: S => O; membrane*Function_for_v_9_1(S, k_3, membrane);

  // Unit definitions:
  unit length = metre;
  unit area = metre^2;
  unit volume = litre;
  unit time = second;
  unit substance = mole;
  unit unit_0 = second; unit_0 is "s";
  unit unit_1 = mole; unit_1 is "mol";
end
