// SBML level 2 version 4
// dcterms:bibliographicCitation: http://identifiers.org/doi/10.1038/35002125

function Function_for_v_9(Y_protein, tau_prot)
  Y_protein*ln(2)/tau_prot;
end

function Function_for_v_13(KM, X_protein, n_Hill, tps_active, tps_repr)
  60*tps_repr - KM^n_Hill*(60*tps_repr - 60*tps_active)/(KM^n_Hill + X_protein^n_Hill);
end

function Function_for_v_6_2(Z_mRNA, eff, tau_mRNA)
  Z_mRNA*eff/tau_mRNA;
end

function Function_for_v_1_2(Y_mRNA, tau_mRNA)
  Y_mRNA*ln(2)/tau_mRNA;
end

function Function_for_v_0_2(X_mRNA, tau_mRNA)
  X_mRNA*ln(2)/tau_mRNA;
end

function Function_for_v_4_1(X_mRNA, eff, tau_mRNA)
  X_mRNA*eff/tau_mRNA;
end

function Function_for_v_5_2(Y_mRNA, eff, tau_mRNA)
  Y_mRNA*eff/tau_mRNA;
end

function Function_for_v_8_1(X_protein, tau_prot)
  X_protein*ln(2)/tau_prot;
end

function Function_for_v_10(Z_protein, tau_prot)
  Z_protein*ln(2)/tau_prot;
end

function Function_for_v_12(KM, Z_protein, n_Hill, tps_active, tps_repr)
  60*tps_repr - KM^n_Hill*(60*tps_repr - 60*tps_active)/(KM^n_Hill + Z_protein^n_Hill);
end

function Function_for_v_14(KM, Y_protein, n_Hill, tps_active, tps_repr)
  60*tps_repr - KM^n_Hill*(60*tps_repr - 60*tps_active)/(KM^n_Hill + Y_protein^n_Hill);
end

function Function_for_v_15(KM, X_protein, n_Hill, tps_active, tps_repr)
  60*tps_repr - KM^n_Hill*(60*tps_repr - 60*tps_active)/(KM^n_Hill + X_protein^n_Hill);
end

function Function_for_v_7_1(GFP_mRNA, eff_GFP, tau_mRNA_GFP)
  GFP_mRNA*eff_GFP/tau_mRNA_GFP;
end

function Function_for_v_2_2(Z_mRNA, tau_mRNA)
  Z_mRNA*ln(2)/tau_mRNA;
end

function Function_for_v_3_2(GFP_mRNA, tau_mRNA_GFP)
  GFP_mRNA*ln(2)/tau_mRNA_GFP;
end

function Function_for_v_11(GFP, tau_prot_GFP)
  GFP*ln(2)/tau_prot_GFP;
end

model model_Elowitz_Nature2000()
  // PEtab implementation of the model from Elowitz et al. (2000), Nature. 2000 Jan 20;403(6767):335-8
  // isDescribedBy doi:10.1038/35002125

  // Compartments:
  compartment cell = 1;

  // Species:
  species LacI_protein in cell = init_X_protein;
  species TetR_protein in cell = init_Y_protein;
  species cI_protein in cell = init_Z_protein;
  species GFP in cell = init_GFP;
  species LacI_mRNA in cell = init_X_mRNA;
  species TetR_mRNA in cell = init_Y_mRNA;
  species cI_mRNA in cell = init_Z_mRNA;
  species GFP_mRNA in cell = init_GFP_mRNA;

  // Parameters:
  KM = 1.000132e-5;
  eff = 0.03015928;
  eff_GFP = 0.001952122;
  init_GFP = 3.38717e-5;
  init_GFP_mRNA = 131.4357;
  init_X_mRNA = 2.556658;
  init_X_protein = 30.80877;
  init_Y_mRNA = 999.9999;
  init_Y_protein = 0.0008182681;
  init_Z_mRNA = 19.36703;
  init_Z_protein = 994.382;
  n_Hill = 1.522546;
  tau_mRNA = 12.62482;
  tau_mRNA_GFP = 0.0004040644;
  tau_prot = 5.359265;
  tau_prot_GFP = 71.93126;
  tps_active = 0.612279;
  tps_repr = 1e-5;
  background = 1.044541e-5;
  scale = 0.5259966;
  sigma = 0.07184141;

  // Assignment rules:
  observableParameter1_fluorescence := background;
  observableParameter2_fluorescence := scale;
  fluorescence := observableParameter1_fluorescence + GFP*observableParameter2_fluorescence;

  // Reactions:
  v_0: LacI_mRNA => ; cell*Function_for_v_0_2(LacI_mRNA, tau_mRNA);
  v_1: TetR_mRNA => ; cell*Function_for_v_1_2(TetR_mRNA, tau_mRNA);
  v_2: cI_mRNA => ; cell*Function_for_v_2_2(cI_mRNA, tau_mRNA);
  v_3: GFP_mRNA => ; cell*Function_for_v_3_2(GFP_mRNA, tau_mRNA_GFP);
  v_4: => LacI_protein; cell*Function_for_v_4_1(LacI_mRNA, eff, tau_mRNA);  // modifiers: LacI_mRNA
  v_5: => TetR_protein; cell*Function_for_v_5_2(TetR_mRNA, eff, tau_mRNA);  // modifiers: TetR_mRNA
  v_6: => cI_protein; cell*Function_for_v_6_2(cI_mRNA, eff, tau_mRNA);  // modifiers: cI_mRNA
  v_7: => GFP; cell*Function_for_v_7_1(GFP_mRNA, eff_GFP, tau_mRNA_GFP);  // modifiers: GFP_mRNA
  v_8: LacI_protein => ; cell*Function_for_v_8_1(LacI_protein, tau_prot);
  v_9: TetR_protein => ; cell*Function_for_v_9(TetR_protein, tau_prot);
  v_10: cI_protein => ; cell*Function_for_v_10(cI_protein, tau_prot);
  v_11: GFP => ; cell*Function_for_v_11(GFP, tau_prot_GFP);
  v_12: => LacI_mRNA; cell*Function_for_v_12(KM, cI_protein, n_Hill, tps_active, tps_repr);  // modifiers: cI_protein
  v_13: => TetR_mRNA; cell*Function_for_v_13(KM, LacI_protein, n_Hill, tps_active, tps_repr);  // modifiers: LacI_protein
  v_14: => cI_mRNA; cell*Function_for_v_14(KM, TetR_protein, n_Hill, tps_active, tps_repr);  // modifiers: TetR_protein
  v_15: => GFP; cell*Function_for_v_15(KM, LacI_protein, n_Hill, tps_active, tps_repr);  // modifiers: LacI_protein

  // Unit definitions:
  unit length = metre;
  unit area = metre^2;
  unit volume = litre;
  unit time = 0.06 second;
  unit substance = mole;
end
