// SBML level 3 version 1

model curve_types_model()
  // Koenig sbmlutils example
  // Description
  // Single reaction.
  // The content of this model has been carefully created in a manual research effort.
  // This file has been created by Matthias Koenig.
  // Terms of use
  // Copyright © 2021 Matthias Koenig.
  // Redistribution and use of any part of this model, with or without modification, are permitted provided that the following conditions are met:
  // Redistributions of this SBML file must retain the above copyright notice, this list of conditions and the following disclaimer.
  // Redistributions in a different form must reproduce the above copyright notice, this list of conditions and the following disclaimer in the documentation and/or other materials provided with the distribution.
  // This model is distributed in the hope that it will be useful, but WITHOUT ANY WARRANTY; without even the implied warranty of MERCHANTABILITY or FITNESS FOR A PARTICULAR PURPOSE.
  // model units - substance: mmole, time: min, volume: litre, length: metre, extent: mmole

  // Compartments:
  compartment cell = 1 litre;

  // Species:
  species S1 in cell = 10;
  species S2 in cell = 5;
  species S3 in cell = 0;

  // Parameters:
  k = 0.3 litre_per_min;

  // Reactions:
  _J0: S1 => S2; k*S1;
  _J1: S2 => S3; k*S2;

  // Unit definitions:
  unit min = 60 second;
  unit mmole = 1e-3 mole;
  unit mM = 1e-3 mole / litre;
  unit mmole_per_min = 1e-3 mole / (60 second);
  unit litre_per_min = litre / (60 second);
end
