// SBML level 3 version 2
// Created with https://github.com/matthiaskoenig/sbmlutils.

model spt_liver(Vext, Vli, S_ext, S, P_ext, P, T)
  // Model for hepatic S -> P + T metabolism in the liver
  // Model for hepatic metabolism of substrate (S) to product (P) and toxic byproduct (T) encoded in SBML format.
  // The model consists of of a single liver compartment with single metabolic conversion reaction which converts the substrate S to the product P and a toxic byproduct T S -> P + T. The product P can be exported from the liver with the toxic side product T being confined to the liver.
  // If the hepatic concentration of the toxic substance T reaches a critical threshold necrosis is initiated.
  // version: 1
  // Changelog
  // version 1
  // initial model version based on minimal apap model
  // Terms of use
  // The content of this model has been carefully created in a manual research effort. This file has been created by Matthias König using sbmlutils . For questions contact koenigmx@hu-berlin.de.
  // Copyright © 2022 Matthias König.
  // This work is licensed under a Creative Commons Attribution 4.0 International License.
  // Redistribution and use of any part of this model, with or without modification, are permitted provided that the following conditions are met:
  // Redistributions of this SBML file must retain the above copyright notice, this list of conditions and the following disclaimer.
  // Redistributions in a different form must reproduce the above copyright notice, this list of conditions and the following disclaimer in the documentation and/or other materials provided with the distribution.
  // This model is distributed in the hope that it will be useful, but WITHOUT ANY WARRANTY; without even the implied warranty of MERCHANTABILITY or FITNESS FOR A PARTICULAR PURPOSE.
  // model units - substance: mmole, time: min, volume: litre, area: m2, length: metre, extent: mmole

  // Compartments:
  compartment Vext = 1.5 litre; Vext is "plasma";  // SBO:0000290 ncit:C13356 BTO:0000131
  compartment Vli; Vli has litre; Vli is "liver";  // SBO:0000290 FMA:7197 BTO:0000759 ncit:C12392
  compartment Vli_nofat = 1.5 litre; Vli_nofat is "liver volume no fat";  // SBO:0000410
  compartment Vli_fat = 0 litre; Vli_fat is "liver fat volume";  // SBO:0000410
  compartment Vmem = 1 m2; Vmem is "plasma membrane";  // SBO:0000290 ncit:C13735 FMA:63841 GO:0005886

  // Species:
  species S_ext in Vext = 0; S_ext is "substrate S (plasma)";  // SBO:0000247 ncit:C120264
  species S in Vli_nofat = 0; S is "substrate S";  // SBO:0000247 ncit:C120264
  species P_ext in Vext = 0; P_ext is "product P (plasma)";  // SBO:0000247 ncit:C51980
  species P in Vli_nofat = 0; P is "product P";  // SBO:0000247 ncit:C51980
  species T in Vli_nofat = 0; T is "toxic product T";  // SBO:0000247 ncit:C28004
  substanceOnly species protein in Vli_nofat = 1;  // substance in dimensionless; conversionFactor cf_species_dimensionless; SBO:0000245 ncit:C17021 FMA:67257

  // Parameters:
  cf_species_dimensionless = 1 per_mmole; cf_species_dimensionless is "conversion factor for dimensionless species";  // SBO:0000002
  T_necrosis_threshold = 1 mM; T_necrosis_threshold is "T threshold for necrosis to occur [mM]";
  necrosis has dimensionless; necrosis is "necrosis state [0 (alive), 1 (death)]";
  tsim = 0 min; tsim is "simulation time";
  f_fat has dimensionless; f_fat is "fat fraction of volume";
  SIM_Vmax has mmole_per_min_l; SIM_Vmax is "Vmax S import";  // SBO:0000186
  SIM_Km_S = 0.5 mM; SIM_Km_S is "Km S import";  // SBO:0000027
  PEX_Vmax has mmole_per_min_l; PEX_Vmax is "Vmax P export";  // SBO:0000186
  PEX_Km_P = 0.5 mM; PEX_Km_P is "Km S import";  // SBO:0000027
  S2PT_Vmax = 0.05 mmole_per_min_l; S2PT_Vmax is "Vmax S clearance";  // SBO:0000186
  S2PT_Km_S = 0.5 mM; S2PT_Km_S is "Km S clearance";  // SBO:0000027
  TDETOX_Vmax = 0.005 mmole_per_min_l; TDETOX_Vmax is "Vmax T detoxification";
  TDETOX_Km_napqi = 0.5 mM; TDETOX_Km_napqi is "Km T detoxifictation";

  // Assignment rules:
  necrosis := piecewise(1, T > T_necrosis_threshold, 0);
  Vli := Vli_nofat + Vli_fat;
  f_fat := Vli_fat/(Vli_fat + Vli_nofat);
  SIM_Vmax := S2PT_Vmax*100;
  PEX_Vmax := S2PT_Vmax*100;

  // Rate rules:
  tsim' = 1;

  // Reactions:
  SIM: S_ext -> S; (1 - necrosis)*SIM_Vmax/SIM_Km_S*Vli_nofat*(S_ext - S)/(1 + S_ext/SIM_Km_S + S/SIM_Km_S); SIM is "substrate import (SIM)";  // SBO:0000655
  PEX: P -> P_ext; (1 - necrosis)*PEX_Vmax/PEX_Km_P*Vli_nofat*(P - P_ext)/(1 + P_ext/PEX_Km_P + P/PEX_Km_P); PEX is "product export (PEX)";  // SBO:0000655
  S2PT: S => P + T; (1 - necrosis)*protein*S2PT_Vmax*Vli_nofat*(S/(S + S2PT_Km_S)); S2PT is "substrate to product conversion (S2PT)";  // modifiers: protein; SBO:0000176
  TDETOX: T => ; (1 - necrosis)*TDETOX_Vmax*Vli_nofat*(T/(T + TDETOX_Km_napqi)); TDETOX is "detoxification T (TDETOX)";  // SBO:0000176

  // Unit definitions:
  unit g_per_mole = gram / mole; g_per_mole is "g/mole";
  unit l_per_min = litre / (60 second); l_per_min is "l/min";
  unit m2 = metre^2; m2 is "meter^2";
  unit mM = 1e-3 mole / litre; mM is "mmole/liter";
  unit mg = 1e-3 gram;
  unit mg_per_s_l = 1e-3 gram / (second * litre); mg_per_s_l is "mg/s/l";
  unit min = 60 second;
  unit min_per_hr = 60 second / (3600 second); min_per_hr is "min/hour";
  unit ml = 1e-3 litre;
  unit mmole = 1e-3 mole;
  unit mmole_per_min = 1e-3 mole / (60 second); mmole_per_min is "mmole/min";
  unit mmole_per_min_l = 1e-3 mole / (60 second * litre); mmole_per_min_l is "mmole/min/l";
  unit mumole = 1e-6 mole; mumole is "µmole";
  unit per_min = 1 / (60 second); per_min is "1/min";
  unit per_mmole = 1 / (1e-3 mole); per_mmole is "1/mmole";
end
