// SBML level 3 version 2
// Created with https://github.com/matthiaskoenig/sbmlutils.

model simple_chain()
  // Model Simple Chain
  // Simple S1 ➞ S2 ➞ S3 conversion for testing.

  // Compartments:
  compartment Vli = 1; Vli is "liver volume";

  // Species:
  species S1 in Vli = 1;
  species S2 in Vli = 0;
  species S3 in Vli = 0;

  // Parameters:
  k1 = 1; k1 is "rate S1 ➞ S2 conversion";
  k2 = 1; k2 is "rate S2 ➞ S3 conversion";

  // Reactions:
  R1_S1_S2_conversion: S1 => S2; k1*S1; R1_S1_S2_conversion is "R1: S1 ➞ S2 conversion";
  R2_S2_S3_conversion: S2 => S3; k2*S2; R2_S2_S3_conversion is "R2: S2 ➞ S3 conversion";
end
